*Heading
** Job name: short_elastic Model name: Model-1
** Generated by: Abaqus/CAE 6.14-2
*Preprint, echo=NO, model=NO, history=NO, contact=NO
**
** PARTS
**
*Part, name=pile
*Node
      1,         3.75,           0.,          21.
      2,        -3.75,           0.,          21.
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*Element, type=C3D20R
  1,   26,   19,    2,    3,   67,   60,   43,   44,  906,  905,  904,  903,  907,  908,  909,
      910,  912,  911,  913,  914
  2,   12,   41,   40,   11,   53,   82,   81,   52,  918,  917,  916,  915,  919,  920,  921,
      922,  924,  923,  925,  926
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*Nset, nset=Set-1, generate
    1,  3303,     1
*Elset, elset=Set-1, generate
   1,  630,    1
** Section: Section-1
*Solid Section, elset=Set-1, material=pile
,
*End Part
**
*Part, name=soil
*Node
      1,   3.75479102,           0.,          40.
      2,  -3.75479102,           0.,          40.
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*Element, type=C3D20R
  1,     4,    14,    22,    20,    39,    49,    57,    55,  8555,  8554,  8553,  8552,  8556,  8557,  8558,
      8559,  8561,  8560,  8562,  8563
  2,    28,    33,    32,    35,    63,    68,    67,    70,  8567,  8566,  8565,  8564,  8568,  8569,  8570,
      8571,  8573,  8572,  8574,  8575
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*Nset, nset=soil1
     1,     2,     3,     4,     5,     6
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*Elset, elset=soil1, generate
 3473,  7312,     1
*Nset, nset=soil2
     1,     2,     3,     4,     5,     6
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*Elset, elset=soil2, generate
    1,  3472,     1
*Nset, nset=Set-47, generate
     1,  32902,      1
*Elset, elset=Set-47, generate
    1,  7312,     1
*Nset, nset=soil1a
     2,     5,     6,     7,    16,    17
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*Elset, elset=soil1a, generate
 5393,  7312,     1
*Nset, nset=soil1b
     1,     3,     4,     5,    13,    14
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*Elset, elset=soil1b, generate
 3473,  5392,     1
*Nset, nset=soil2a
     1,     2,     3,     4,     5,     6
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*Elset, elset=soil2a, generate
  401,  3472,     1
** Section: Section-2
*Solid Section, elset=Set-47, material=soil
,
*End Part
**
**
** ASSEMBLY
**
*Assembly, name=Assembly
**
*Instance, name=pile-1, part=pile
          0.,           0.,          40.
*End Instance
**
*Instance, name=soil-1, part=soil
*End Instance
**
*Nset, nset="ALL NODES", instance=soil-1, generate
     1,  32902,      1
*Elset, elset=ALLELE, instance=soil-1, generate
    1,  7312,     1
*Nset, nset=Set-1, instance=pile-1, generate
    1,  3303,     1
*Nset, nset=Set-1, instance=soil-1, generate
     1,  32902,      1
*Elset, elset=Set-1, instance=pile-1, generate
   1,  630,    1
*Elset, elset=Set-1, instance=soil-1, generate
    1,  7312,     1
*Nset, nset=Set-2, instance=pile-1
 2,
*Nset, nset=Set-3, instance=soil-1
     1,     2,     3,     4,     5,     6
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*Elset, elset=Set-3, instance=soil-1, generate
  401,  7312,     1
*Nset, nset=Set-4, instance=soil-1
   561,   562,   563,   564,   565,   566
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*Elset, elset=Set-4, instance=soil-1
  416,  432,  448,  464,  480,  496
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*Nset, nset=Set-5, instance=pile-1
    1,    2,   13,   14,   15,   16
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*Nset, nset=Set-5, instance=soil-1
     1,     2,     8,     9,    10,    11
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*Elset, elset=Set-5, instance=pile-1
   1,   3,   7,   8,   9,  10
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*Elset, elset=Set-5, instance=soil-1
    5,    6,    7,   17,   23,   24
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*Nset, nset=Set-15, instance=soil-1
   561,   562,   563,   564,   565,   566
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*Elset, elset=_Surf-7_S3, internal, instance=soil-1, generate
  24,  399,   25
*Elset, elset=_Surf-7_S4, internal, instance=soil-1
   7,  23,  32,  48,  57,  73
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*Elset, elset=_Surf-7_S5, internal, instance=soil-1
  481,  482,  483,  484,  485,  486
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*Elset, elset=_Surf-7_S6, internal, instance=soil-1
   5,   6,  17,  30,  31,  42
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*Surface, type=ELEMENT, name=Surf-7
_Surf-7_S3, S3
_Surf-7_S4, S4
_Surf-7_S6, S6
_Surf-7_S5, S5
*Elset, elset=_Surf-8_S1, internal, instance=soil-1
 1841, 1842, 1843, 1844, 1845, 1846
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*Elset, elset=_Surf-8_S2, internal, instance=soil-1, generate
 376,  400,    1
*Elset, elset=_Surf-8_S4, internal, instance=soil-1, generate
  416,  1936,    16
*Elset, elset=_Surf-8_S6, internal, instance=soil-1, generate
 1937,  3457,    16
*Surface, type=ELEMENT, name=Surf-8
_Surf-8_S1, S1
_Surf-8_S2, S2
_Surf-8_S4, S4
_Surf-8_S6, S6
*Elset, elset=_bc1_S1, internal, instance=soil-1
 1841, 1842, 1843, 1844, 1845, 1846
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*Elset, elset=_bc1_S6, internal, instance=soil-1, generate
 1937,  3457,    16
*Elset, elset=_bc1_S2, internal, instance=soil-1, generate
 376,  400,    1
*Elset, elset=_bc1_S4, internal, instance=soil-1, generate
  416,  1936,    16
*Surface, type=ELEMENT, name=bc1
_bc1_S1, S1
_bc1_S6, S6
_bc1_S2, S2
_bc1_S4, S4
*Elset, elset=_bc2_S5, internal, instance=soil-1
  481,  482,  483,  484,  485,  486
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*Elset, elset=_bc2_S6, internal, instance=soil-1
   5,   6,  17,  30,  31,  42
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*Elset, elset=_bc2_S4, internal, instance=soil-1
   7,  23,  32,  48,  57,  73
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*Elset, elset=_bc2_S3, internal, instance=soil-1, generate
  24,  399,   25
*Surface, type=ELEMENT, name=bc2
_bc2_S5, S5
_bc2_S6, S6
_bc2_S4, S4
_bc2_S3, S3
*Elset, elset=_tiepile_S5, internal, instance=pile-1
  31,  50,  52,  53,  54,  55
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*Elset, elset=_tiepile_S6, internal, instance=pile-1
  32,  37,  62,  67,  92,  97
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*Elset, elset=_tiepile_S3, internal, instance=pile-1
  44,  47,  48,  49,  74,  77
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*Elset, elset=_tiepile_S2, internal, instance=pile-1, generate
 601,  630,    1
*Surface, type=ELEMENT, name=tiepile
_tiepile_S5, S5
_tiepile_S6, S6
_tiepile_S2, S2
_tiepile_S3, S3
*Elset, elset=_tiesoil_S2, internal, instance=soil-1
 3473, 3474, 3475, 3476, 3477, 3478
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*Elset, elset=_tiesoil_S1, internal, instance=soil-1, generate
  1,  25,   1
*Surface, type=ELEMENT, name=tiesoil
_tiesoil_S2, S2
_tiesoil_S1, S1
** Constraint: soil-pile
*Tie, name=soil-pile, adjust=yes
tiesoil, tiepile
*End Assembly
*Amplitude, name=Amp-1
             0.,              0.,            0.01,     0.031410759,            0.02,     0.062790518,            0.03,     0.094108312
           0.04,     0.125333231,            0.05,     0.156434462,            0.06,     0.187381311,            0.07,     0.218143238
           0.08,     0.248689883,            0.09,     0.278991101,             0.1,     0.309016989,            0.11,     0.338737915
           0.12,     0.368124547,            0.13,     0.397147884,            0.14,     0.425779285,            0.15,     0.453990493
           0.16,     0.481753667,            0.17,     0.509041408,            0.18,     0.535826787,            0.19,     0.562083369
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             1.,     5.35898e-08
*Amplitude, name="body force", time=TOTAL TIME
             0.,              0.,              1.,              1.,           1e+20,              1.
**
** MATERIALS
**
*Material, name=pile
*Density
20.,
*Elastic
 2e+11, 0.2
*Material, name=soil
*Density
15.,
*Elastic
 1.1e+07, 0.45
 *initial CONDITIONS, type=stress, user
**
** BOUNDARY CONDITIONS
**
** Name: BOUNDXYZ Type: Displacement/Rotation
*Boundary
Set-15, 1, 1
Set-15, 2, 2
Set-15, 3, 3
Set-15, 4, 4
Set-15, 5, 5
Set-15, 6, 6
** Name: BOUNDY Type: Symmetry/Antisymmetry/Encastre
*Boundary
Set-5, YSYMM
** ----------------------------------------------------------------
**
** STEP: Step-1
**
*Step, name=Step-1, nlgeom=NO, unsymm=YES
*Geostatic
**
** LOADS
**
** Name: Load-1   Type: Body force
*Dload, amplitude="body force"
Set-1, BZ, -1e-14
**
** OUTPUT REQUESTS
**
*Restart, write, frequency=0
**
** FIELD OUTPUT: F-Output-1
**
*Output, field, variable=PRESELECT
**
** HISTORY OUTPUT: H-Output-1
**
*Output, history, variable=PRESELECT
*element matrix output, elset=ALLELE, file name=shortpile, frequency=200, outputfile=user defined, stiffness=yes
*End Step
